# LJ Fluid with Hollow Flow Region
units           lj
dimension       3
#boundary        f p p
boundary        p p p
atom_style      full/gc/HAdResS

# Variables
variable     label          index   bld_geometry
variable     BOXZ           equal   20            # Box Z length
variable     Lx             equal   30.0              # Box x length
variable     Ly             equal   14.0              # Box y length
variable     Lz             equal   10.0              # Box z length
variable     half_Lx        equal   ${Lx}/2.0
variable     half_Ly        equal   ${Ly}/2.0
variable     half_Lz        equal   ${Lz}/2.0
variable     Lx_h           equal   30.0            # Hollow region x length
variable     Ly_h           equal   14.0            # Hollow region y length
variable     Lz_h           equal   8.8            # Hollow region z length
variable     half_Lx_h      equal   ${Lx_h}/2.0
variable     half_Ly_h      equal   ${Ly_h}/2.0
variable     half_Lz_h      equal   ${Lz_h}/2.0
variable     Lx_f           equal   30.0            # Flow region x length
variable     Ly_f           equal   14.0            # Flow region y length
variable     Lz_f           equal   7.0            # Flow region z length
variable     half_Lx_f      equal   ${Lx_f}/2.0
variable     half_Ly_f      equal   ${Ly_f}/2.0
variable     half_Lz_f      equal   ${Lz_f}/2.0
variable     epsilon        equal   1         # Interaction energy scale
variable     sigma          equal   1           # Particle size
variable     eta            equal   1             # Interaction strength parameter
variable     system_temp    equal   1.57892098513     # System temperature
variable     pressure       equal   2.65        # System pressure
variable     dt             equal   0.001       # Time step
variable     kappa          equal   1000           # Spring constant for wall-wall harmonic interactions
variable     r0             equal   1.1626              # Equilibrium distance for wall-wall interactions

molecule     mol1 /data/bee8/diazd/projects/Parabolic_flow/scripts/../input_files/atom_details/LJ_A.dat

neighbor 0.5 bin
neigh_modify every 1 delay 0 check yes

lattice         fcc 0.9
region          box block -${half_Lx} ${half_Lx} -${half_Ly} ${half_Ly} -${BOXZ} ${BOXZ} units lattice
create_box      2 box

# Regions for boundary and flow
region          boundary_reg block  -${half_Lx} ${half_Lx}      -${half_Ly} ${half_Ly}      -${half_Lz} ${half_Lz}      units lattice
region          hollow block        -${half_Lx_h} ${half_Lx_h}  -${half_Ly_h} ${half_Ly_h}  -${half_Lz_h} ${half_Lz_h}  units lattice
region          flow_reg block      -${half_Lx_f} ${half_Lx_f}  -${half_Ly_f} ${half_Ly_f}  -${half_Lz_f} ${half_Lz_f}  units lattice

# Creating boundary atoms
create_atoms    2 region boundary_reg
group           boundary region boundary_reg

# Creating hollow space in the boundary
delete_atoms    region hollow

# Creating flow atoms using molecule mol1
create_atoms    0 region flow_reg mol mol1 2851
group           flow region flow_reg

mass            1 1.0
mass            2 1.0

# Pair styles for non-bonded interactions

# Pair styles for non-bonded interactions
pair_style      hybrid/overlay lj/cut 2.5
pair_modify     shift yes tail no mix geometric

pair_coeff   1 1 lj/cut 1 1 2.5          # s-s interactions
pair_coeff   1 2 lj/cut 1 1 1.122462048309373  # s-w interactions using WCA potential
pair_coeff   2 2 lj/cut 0 0 1.122462048309373                # w-w interactions
#pair_coeff  2 2 harmonic/cut 1000 1.1626 2.5         # w-w

# Initialize velocities
reset_atom_ids
velocity      flow create 3.15784197026 12345 dist uniform

#fix        1 flow nvt temp 2.0 2.0 10
fix         1 all npt temp 1.57892098513 1.57892098513 10 aniso 2.65 2.65 100

# Output settings
dump            trj all custom 300 ${label}.lammpstrj id type element x y z
thermo          20

compute myTemp flow temp
compute myPress all pressure myTemp
thermo_style    custom step temp etotal c_myTemp c_myPress

timestep        0.001

# Freeze wall particles
fix freezeWall boundary setforce 0.0 0.0 0.0
#fix         wallBottom  all wall/reflect xlo -15#-15
#fix         wallTop     all wall/reflect xhi 14.6#14.6

# Continue with production run
run          100000

write_restart /data/bee8/diazd/projects/Parabolic_flow/scripts/../output_files/BUILD/X30.0_YZ14.0_10.0_PRESS2.65_TEMP1.57892098513/${label}.restart
